// SBML level 2 version 4

model mm_sbml()
  // Exported mm model

  // Compartments:
  // Note for the Default compartment
  compartment default_comp = 1 L; default_comp is "Default compartment";

  // Species:
  species S in default_comp = 10; S is "substrate";  // substance in uM_L
  species P in default_comp = 0; P is "product";  // substance in uM_L

  // Parameters:
  Vmax = 0.1;
  Km = 2.5 uM;

  // Reactions:
  // Transformation of substate to product
  Michaelis_Menten_reaction: S => P; Vmax*S/(Km + S)*default_comp; Michaelis_Menten_reaction is "Michaelis-Menten reaction";

  // Unit definitions:
  unit L = litre;
  unit uM_L = 1e-6 mole; uM_L is "uM*L";
  unit umole__min = 1e-6 mole / (60 second); umole__min is "umole/min";
  unit uM = 1e-6 mole / litre;
end
