// SBML level 3 version 1

model mm()
  // model units - time: _minute

  // Compartments:
  // Note for the Default compartment
  compartment default_comp = 1 _L; default_comp is "Default compartment";

  // Species:
  species S in default_comp = 10; S is "substrate";  // substance in _uM_L
  species P in default_comp = 0; P is "product";  // substance in _uM_L

  // Parameters:
  Vmax = 0.1 _uM__minute;
  Km = 2.5 _uM;

  // Reactions:
  // Transformation of substrate to product
  Michaelis_Menten_reaction: S => P; Vmax*S/(Km + S)*default_comp; Michaelis_Menten_reaction is "Michaelis-Menten reaction";

  // Unit definitions:
  unit _minute = 60 second;
  unit _L = litre;
  unit _uM_L = 1e-6 mole; _uM_L is "uM*L";
  unit _umole__minute = 1e-6 mole / (60 second); _umole__minute is "umole/minute";
  unit _uM__minute = 1e-6 mole / (litre * 60 second); _uM__minute is "uM/minute";
  unit _uM = 1e-6 mole / litre;
end
