// SBML level 2 version 4

model mm()

  // Compartments:
  // Note for the Default compartment
  compartment default_comp = 1 units_L; default_comp is "Default compartment";

  // Species:
  species S in default_comp = 10; S is "substrate";  // substance in units_uM_L
  species P in default_comp = 0; P is "product";  // substance in units_uM_L

  // Parameters:
  Vmax = 0.1 units_uM__minute;
  Km = 2.5 units_uM;

  // Reactions:
  // Transformation of substrate to product
  Michaelis_Menten_reaction: S => P; Vmax*S/(Km + S)*default_comp; Michaelis_Menten_reaction is "Michaelis-Menten reaction";

  // Unit definitions:
  unit units_minute = 60 second;
  unit units_L = litre;
  unit units_uM_L = 1e-6 mole; units_uM_L is "uM*L";
  unit units_umole__minute = 1e-6 mole / (60 second); units_umole__minute is "umole/minute";
  unit units_uM__minute = 1e-6 mole / (litre * 60 second); units_uM__minute is "uM/minute";
  unit units_uM = 1e-6 mole / litre;
end
