// SBML level 2 version 4

model nameless()

  // Compartments:
  compartment comp0 = 1;
  compartment comp1 = 5.2;

  // Species:
  substanceOnly species a0 in comp0 = 0;  // substance in _mole
  species s1 in comp1 = 0;
  species s2 in comp1 = 0;

  // Parameters:
  kabs = 0.01;
  kel = 0.01;
  sw2_start = 5;

  // Reactions:
  vabs: a0 => s1; kabs*a0;
  vel: s1 => ; kel*s1*comp1;

  // Events:
  sw0: at (): ;
  sw1: at (false && ((time - 0)/12 - floor((time - 0)/12 + 0.5) >= 0) && (time <= 60)): a0 = a0 + 10, comp1 = 6;
  sw2: at ((time - sw2_start)/24 - floor((time - sw2_start)/24 + 0.5) >= 0): s1 = s1 + 2, s2 = s2 + 2;

  // Unit definitions:
  unit _mole = mole;
end
