// SBML level 2 version 4

model first()

  // Compartments:
  // This is just text. italic, bold
  // another line
  compartment comp1 = x*y; comp1 has units_L; comp1 is "This is compartment";
  compartment comp2 = 3.2;

  // Species:
  species s1 in comp2 = 1.1;
  species $s2_title in comp1;

  // Parameters:
  p2 = 15.223 units_nm__min__fM;
  p3 has units__h__L;
  evt1 has units_min;

  // Assignment rules:
  p3 := xxx*yyy;
  evt1 := time - 12;
  s2_title := x*y;

  // Reactions:
  r2: 2 s1 -> $s2_title; p2*comp1*s1;
  r3: -> ; 28;  // modifiers: s2_title

  // Events:
  sw1: at (evt1 >= 0): s1 = 1.5;
end
