// SBML level 2 version 4

model nameless()

  // Compartments:
  // This is the first compartment.
  compartment comp1 = 1.1 units_L; comp1 is "First Compartment";
  compartment comp2 = 2.2;

  // Species:
  substanceOnly species s1 in comp1 = 10;  // substance in units_mole
  species s2 in comp2 = s2_0;
  species s3 in comp2 = 0;
  species s4 in comp2 = 5;
  species $s5 in comp2 = 2.4;

  // Parameters:
  AUC_s3 = 0;
  x1 = rec1;
  k1 = 0.001;
  k2 = 0.022;
  k3 = 0.0021;
  k4 = 0.001;
  Keq3 = 4;
  PS = 0.1;
  s2_0 = 0.3;
  dose = 10;

  // Assignment rules:
  pr1 := s3;
  rec1 := k1*s1*PS;

  // Rate rules:
  AUC_s3' = 1*pr1;

  // Reactions:
  r1: s1 => s2; k1*(s1 - s2)*PS;
  r2: s2 + $s5 => s4 + 2 s3; k2*s2*s5*comp2;
  r3: s3 -> s4; k3*(s3 - s4/Keq3)*comp2;
  r4: s3 => ; k4*s3*comp2;

  // Events:
  sw1: at ((time - 12)/6 - floor((time - 12)/6 + 0.5) >= 0): s1 = s1 + dose, s2 = s2 + dose/comp2;

  // Unit definitions:
  unit units_L = litre;
  unit units_mole = mole;
end
