// SBML level 2 version 4

model two_comp()

  // Compartments:
  // some words
  // another words
  // xxx xxxx italic bold strong word ref
  compartment c0 = 1 L;
  compartment c1 = 5 L;
  compartment c2 = 1.5 L;

  // Species:
  substanceOnly species a0 in c0 = a0_0;  // substance in umole
  species s1 in c1 = 0;  // substance in uM_L
  species s2 in c2 = 0;  // substance in uM_L

  // Parameters:
  auc = 0 uM_h;
  evt1 has h;
  a0_0 = 10 umole; a0_0 is "Generated virtual Record";
  kabs = 0.01 __h; kabs is "Generated virtual Record";
  kdiff = 0.01 __h; kdiff is "Generated virtual Record";
  PS = 2.2 m2; PS is "Generated virtual Record";
  kel = 0.00001 __h; kel is "Generated virtual Record";

  // Assignment rules:
  evt1 := t - 12;

  // Rate rules:
  auc' = s1;

  // Reactions:
  r1: a0 -> s1; kabs*a0;
  r2: s1 -> s2; kdiff*PS*(s1 - s2);
  r3: s1 -> ; kel*s1*c1;
  r4: -> s1; fun(x, y) + ceil(x) + log(base, y) + log10(y) + log(2, y) + log(3, y) + x^y + sqrt(x) + max(x1) + max(x1, x2) + max(x1, x2, x3) + max(x1, x2, x3, x4) + min(x1, x2) + min(x1, x2, x3) + min(min(x1, x2), x3);
  r5: -> s1; 0 + piecewise(0, x < 0, x) + piecewise(0, x != time, x);

  // Events:
  sw1: at (evt1 >= 0): a0 = a0 + 10;

  // Unit definitions:
  unit L = litre;
  unit umole = 1e-6 mole;
  unit uM_L = 1e-6 mole; uM_L is "uM*L";
  unit uM_h = 1e-6 mole * 3600 second / litre; uM_h is "uM*h";
  unit h = 3600 second;
  unit __h = 1 / (3600 second); __h is "1/h";
  unit m2 = metre^2; m2 is "m^2";
end
