// SBML level 2 version 4

model nameless()

  // Compartments:
  compartment comp1 = 1;
  compartment comp2 = 1;
  compartment comp3 = 1;
  compartment comp4 = 1;
  compartment comp5 = 1;
  compartment comp6 = 1;

  // Species:
  substanceOnly species spec_amt1 in comp1 = 0;
  species spec_conc1 in comp1 = 1;
  substanceOnly species spec_amt2 in comp2 = 0;
  species spec_conc2 in comp2 = 1;
  substanceOnly species spec_amt3 in comp3 = 0;
  species spec_conc3 in comp3 = 1;
  substanceOnly species spec_amt4 in comp4 = 0;
  species spec_conc4 in comp4 = 1;
  substanceOnly species spec_amt5 in comp5 = 0;
  species spec_conc5 in comp5 = 1;
  substanceOnly species spec_amt6 in comp6 = 0;
  species spec_conc6 in comp6 = 1;

  // Parameters:
  rec1 = 0;
  k1 = 0.001;
  k2 = 0.01;

  // Reactions:
  r4: -> spec_amt4 + spec_conc4; 0.1;
  r5: -> spec_amt5 + spec_conc5; 0.1;
  r6: -> spec_amt6 + spec_conc6; 0.1;

  // Events:
  sw1: at (): rec1 = 12, comp1 = 10, spec_amt1 = 8, spec_conc1 = 6, spec_amt2 = 8, spec_conc2 = 6, comp3 = 10, comp4 = 10, spec_amt4 = 8, spec_conc4 = 6, spec_amt5 = 8, spec_conc5 = 6, comp6 = 10;
end
