// SBML level 2 version 4

model zzz()

  // Compartments:
  compartment comp1 = 1.1 units_litre;

  // Species:
  substanceOnly species s1 in comp1 = 12;  // substance in units_mole
  species s2 in comp1 = 1;  // substance in units_mole
  species $s3 in comp1;  // substance in units_mole

  // Parameters:
  x1 has units_mole2__litre;
  x2 has units_hour;
  k1 = 0.001 units__mole__hour;
  tau = 12 units_hour;
  s3_0 = 15 units_mole__litre;
  // Time in days
  tid has units_day;

  // Assignment rules:
  s3 := s3_0*exp(time/tau);
  x1 := s1*s2;
  x2 := time/2;
  tid := 0.041667*time + 0;

  // Reactions:
  r1: s1 -> s2; k1*s1^2;

  // Unit definitions:
  unit units_hour = 3600 second;
  unit units_litre = litre;
  unit units_mole = mole;
  unit units_mole__hour = mole / (3600 second); units_mole__hour is "mole/hour";
  unit units_day = 86400 second;
  unit units__mole__hour = 1 / (3600 second * mole); units__mole__hour is "1/hour/mole";
  unit units_mole__litre = mole / litre; units_mole__litre is "mole/litre";
  unit units_mole2__litre = mole^2 / litre; units_mole2__litre is "mole^2/litre";
end
