// SBML level 2 version 4

model invitro()

  // Compartments:
  compartment tot_vol = 0.1;
  compartment neu_vol;
  compartment ext;

  // Species:
  species ATP_neu in neu_vol = AXP_neu*K_eq_ADP/(1 + K_eq_ADP);
  species S1 in tot_vol = 150;
  substanceOnly species neu_count in tot_vol = 1000000;
  species ADP_neu in neu_vol = AXP_neu/(1 + K_eq_ADP);
  species P1_neu in neu_vol = 0;
  species P1_ext in ext = 0;
  species IL15_ext in ext = 0;

  // Parameters:
  AXP_neu = 0.1;
  neu_size = 1e-12;
  K_eq_ADP = 10;
  ksyn_ATP = 0.0001;
  ksyn_P1 = 0.01;
  Km_S1 = 1.2;
  k_tr_P1 = 0.013;

  // Assignment rules:
  neu_vol := neu_count*neu_size;
  ext := tot_vol - neu_vol;
  P1_mean := (P1_ext*ext + P1_neu*neu_vol)/tot_vol;

  // Reactions:
  r_syn_ATP: ADP_neu => ATP_neu; ksyn_ATP*neu_vol*(ADP_neu - ATP_neu/K_eq_ADP);
  r_syn_P1: 2 ATP_neu + S1 => 2 ADP_neu + P1_neu; ksyn_P1*neu_vol*S1/(S1 + Km_S1)*ATP_neu^2;  // modifiers: IL15_ext
  r_tr_P1: P1_neu => P1_ext; k_tr_P1*neu_vol*(P1_neu - P1_ext);
end
