// SBML level 2 version 4

model nameless()

  // Compartments:
  compartment c1 = 1;

  // Species:
  species s1 in c1 = 10;
  species m1 in c1 = 0;

  // Parameters:
  rec1 = 12 _ud1_xxx;
  k1 = 0.001;
  period2 = 22;

  // Assignment rules:
  x1 := c1*piecewise(time > 1, 1, time > 2, 2, 0);
  x2 := piecewise(1, time < 2, 2);

  // Reactions:
  r1: s1 => ; k1*s1*c1;  // modifiers: m1
  r2: -> s1; 0.01;

  // Events:
  ts1: at ((time - 12)/24 - floor((time - 12)/24 + 0.5) >= 0): c1 = 1.1, s1 = s1*2 + 1.1;
  ts2: at ((time - 0)/period2 - floor((time - 0)/period2 + 0.5) >= 0): ;
  cs1: at (k1 - 1 >= 0): ;

  // Unit definitions:
  unit _ud1_xxx = mole / litre;
end
