// SBML level 2 version 4

function pow7(x, y)
  2*x*x^7;
end

function xx(x, y)
  x^8 + pow7(x, 1);
end

function xxx(x, y)
  sin(x)*(y*1.2)^3*cos(x);
end

function yyy(x, y)
  1 + sin(x) + y^3 + cos(x);
end

function zzz(x, y)
  xxx(y, x);
end

model nameless()

  // Compartments:
  compartment c1 = 3 units_L;
  compartment c2 = 4 units_mL;
  compartment c3 = 5 units_m;

  // Species:
  species s1 in c1 = 10;  // substance in units_mM_L
  species s2 in c2 = 10;  // substance in units_mM_mL
  species s3 in c3 = 10;  // substance in units_mmole

  // Parameters:
  p1 = 1 units_uM;
  p2 has units_mM_h7;
  y21 has units_metre3;
  y22 has units_metre3;
  k1 = 0.001 units__h;
  k2 = 1.1 units_UL;
  k21 = 1 units_metre;
  k22 = 1 units_mole;

  // Assignment rules:
  p2 := 23*s1/xx(k1, 3);
  y21 := k21^3 + xxx(1.1*2.2, k21);
  y22 := k21^3 + zzz(k21, 3.1415);

  // Reactions:
  r1: s1 => s2; k1*s1*c1;

  // Unit definitions:
  unit units_h = 3600 second;
  unit units_uM = 1e-6 mole / litre;
  unit units_L = litre;
  unit units_mL = 1e-3 litre;
  unit units_m = metre;
  unit units_mM_L = 1e-3 mole; units_mM_L is "mM*L";
  unit units_mM_mL = 1e-3 mole * 1e-3 dimensionless; units_mM_mL is "mM*mL";
  unit units_mmole = 1e-3 mole;
  unit units_mmole__h = 1e-3 mole / (3600 second); units_mmole__h is "mmole/h";
  unit units_mM_h7 = 1e-3 mole * (3600 second)^7 / litre; units_mM_h7 is "mM*h^7";
  unit units__h = 1 / (3600 second); units__h is "1/h";
  unit units_UL = dimensionless;
  unit units_metre = metre;
  unit units_mole = mole;
  unit units_metre3 = metre^3; units_metre3 is "metre^3";
end
