// SBML level 2 version 4

model nameless()

  // Compartments:
  compartment c1 = 5.5;

  // Species:
  species A in c1 = 2;
  species B in c1 = 0;
  species C in c1 = 0;
  species D in c1 = 0;
  species $F in c1;

  // Parameters:
  x1 = 10;
  var1 = 5;
  k1 = 0.1;
  k2 = 0.05;
  k3 = 0.02;

  // Assignment rules:
  F := 10;
  pr1 := 0.0001*var1;

  // Rate rules:
  var1' = -1*pr1;

  // Reactions:
  r1: A => B; k1*A*c1;
  r2: B => C; k2*B*c1;
  r3: A => D; k3*A*c1;

  // Events:
  sw1: at ((time - 24)/24 - floor((time - 24)/24 + 0.5) >= 0): A = A + 1/c1, x1 = x1 + 1, F = F + 1/c1, var1 = var1 + 1;
  sw2: at (time - 48 >= 0): A = A + 1/c1, x1 = x1 + 1, F = F + 1/c1, var1 = var1 + 1;
end
