// SBML level 2 version 4

function lessthan(x, y)
  x < y;
end

model nameless()

  // Compartments:
  compartment C = 1 units_litre;

  // Species:
  species S1 in C = 1/C;  // substance in units_mole
  species S2 in C = 2/C;  // substance in units_mole
  species S3 in C = 1/C;  // substance in units_mole

  // Parameters:
  k1 = 0.75;
  k2 = 0.25;

  // Reactions:
  reaction1: S1 + S2 => S3; C*k1*S1*S2;
  reaction2: S3 => S1 + S2; C*k2*S3;

  // Events:
  event1: at (lessthan(S1, 0.5)): S2 = 1.2;

  // Unit definitions:
  unit units_second = second;
  unit units_litre = litre;
  unit units_mole = mole;
end
