// SBML level 2 version 4

model mod1()

  // Compartments:
  compartment comp1 = 5 units_litre;
  compartment comp2; comp2 has units_litre;

  // Species:
  species sp1 in comp1 = 0;

  // Parameters:
  k1 = 0.1;
  p1 = 1;
  p3 = 1;
  p4 = 0;
  p6 = 2*p4;
  k2 = 0.03;

  // Assignment rules:
  p2 := 1*2;
  p5 := 1*p6;
  comp2 := p1;
  r2 := 1;
  r3 := k2;

  // Rate rules:
  k1' = -2*r2 + 1*r3;
  p4' = 1*r2;

  // Reactions:
  r1: sp1 => ; p1*sp1*comp1;

  // Events:
  sw1: at (): p3 = 12.1;
  sw2: at ((time - 12)/6 - floor((time - 12)/6 + 0.5) >= 0): p3 = p3*p1 + 10, p4 = 0;
  sw3: at (p1 >= 0): p4 = 2;

  // Unit definitions:
  unit units_litre = litre;
end
