// SBML level 2 version 4

function sbml__fn_1(sbml__x_1)
  sbml__x_1 + 1;
end

model nameless()

  // Compartments:
  compartment sbml__comp_1 = 1;

  // Species:
  species sbml__species_1 in sbml__comp_1 = 2/sbml__comp_1;

  // Parameters:
  sbml__k_2 = 3;
  local_sbml__r_1__local = 6;
  sbml_begin_1 = 4;
  sbml__k_1 = 5;

  // Assignment rules:
  sbml__assigned_1 := sbml__k_2 + sbml_begin_1;
  rate_sbml__species_1 := sbml__k_2;

  // Reactions:
  sbml__r_1: sbml__species_1 -> ; sbml__fn_1(local_sbml__r_1__local) + sbml__k_2;

  // Events:
  sbml__event_1: at (true): sbml__k_2 = sbml_begin_1;
end
