// SBML level 2 version 4

model nameless()

  // Compartments:
  compartment gut = 1;
  compartment blood = 5.2;

  // Species:
  substanceOnly species a0_first in gut = 0;
  species c1_first in blood = 0;
  substanceOnly species a0_second in gut = 0;
  species c1_second in blood = 0;
  substanceOnly species a0_third in gut = 0;
  species c1_third in blood = 0;

  // Parameters:
  kabs_first = 0.001;
  kel_first = 0.1;
  kabs_second = 0.002;
  kel_second = 0.2;
  kabs_third = 0.003;
  kel_third = 0.3;

  // Assignment rules:
  x1_first := sin(1.2*t_first);
  x1_second := sin(1.2*t_second);
  x1_third := sin(1.2*t_third);
  t_first := 1*time + 0;
  t_second := 1*time + 0;
  t_third := 1*time + 0;

  // Reactions:
  vabs_first: a0_first -> c1_first; kabs_first*a0_first;
  vel_first: c1_first -> ; kel_first*c1_first*blood;
  vabs_second: a0_second -> c1_second; kabs_second*a0_second;
  vel_second: c1_second -> ; kel_second*c1_second*blood;
  vabs_third: a0_third -> c1_third; kabs_third*a0_third;
  vel_third: c1_third -> ; kel_third*c1_third*blood;
end
